<?xml version="1.0"?>

<!--
  File:     F414.xml
  Author:   AeromatiC++ v 3.3.10

  See: http://wiki.flightgear.org/JSBSim_Engines#FGTurbine

  Inputs:
    name:                    F414
    type:                    Turbine Engine
    thrust:                  13000.0 lbf
    bypass ratio:            0.250:1
    overall pressure ratio:  30.0:1
    augmented?               yes
    injected?                no

-->

<turbine_engine name="F414">
  <milthrust> 13000.0 </milthrust>
  <maxthrust> 22000.0 </maxthrust>
  <bypassratio>     0.250 </bypassratio>
  <tsfc>            0.840 </tsfc>
  <atsfc>           1.850 </atsfc>
  <bleed>           0.03</bleed>
  <idlen1>         30.0 </idlen1>
  <idlen2>         60.0 </idlen2>
  <maxn1>         100.0 </maxn1>
  <maxn2>         100.0 </maxn2>
  <augmented>         1 </augmented>
  <augmethod>         2 </augmethod>
  <injected>          0 </injected>

  <function name="IdleThrust">
   <table>
    <independentVar lookup="row">velocities/mach</independentVar>
    <independentVar lookup="column">atmosphere/density-altitude</independentVar>
    <tableData>
         -10000     0     10000   20000   30000   40000   50000   60000
     0.0  0.0430  0.0488  0.0528  0.0694  0.0899  0.1183  0.1467  0
     0.2  0.0500  0.0501  0.0335  0.0544  0.0797  0.1049  0.1342  0
     0.4  0.0040  0.0047  0.0020  0.0272  0.0595  0.0891  0.1203  0
     0.6 -0.0804 -0.0804 -0.0560 -0.0237  0.0276  0.0718  0.1073  0
     0.8 -0.2129 -0.2129 -0.1498 -0.1025  0.0474  0.0868  0.0900  0
     1.0 -0.2839 -0.2839 -0.1104 -0.0469 -0.0270  0.0552  0.0800  0
    </tableData>
   </table>
  </function>

  <function name="MilThrust">
   <table>
    <independentVar lookup="row">velocities/mach</independentVar>
    <independentVar lookup="column">atmosphere/density-altitude</independentVar>
    <tableData>
          -10000       0   10000   20000   30000   40000   50000   60000
      0.0  1.2600  1.0000  0.7400  0.5340  0.3720  0.2410  0.1490  0.0000
      0.2  1.1646  0.9289  0.6932  0.5032  0.3530  0.2297  0.1422  0.0000
      0.4  1.1373  0.9109  0.6844  0.5004  0.3531  0.2304  0.1434  0.0000
      0.6  1.1615  0.9353  0.7091  0.5232  0.3718  0.2439  0.1515  0.0000
      0.8  1.2303  0.9976  0.7648  0.5692  0.4078  0.2690  0.1663  0.0000
      1.0  1.3314  1.0892  0.8470  0.6331  0.4619  0.3063  0.1896  0.0000
      1.2  1.4360  1.1894  0.9428  0.7194  0.5270  0.3520  0.2176  0.0000
      1.4  1.5327  1.2884  1.0442  0.8125  0.6038  0.4077  0.2529  0.0000
    </tableData>
   </table>
  </function>

  <function name="AugThrust">
   <table>
    <independentVar lookup="row">velocities/mach</independentVar>
    <independentVar lookup="column">atmosphere/density-altitude</independentVar>
    <tableData>
           -10000       0   10000   20000   30000   40000   50000   60000
     0.0    1.1816  1.0000  0.8184  0.6627  0.5280  0.3756  0.2327  0
     0.2    1.1308  0.9599  0.7890  0.6406  0.5116  0.3645  0.2258  0
     0.4    1.1150  0.9474  0.7798  0.6340  0.5070  0.3615  0.2240  0
     0.6    1.1284  0.9589  0.7894  0.6420  0.5134  0.3661  0.2268  0
     0.8    1.1707  0.9942  0.8177  0.6647  0.5309  0.3784  0.2345  0
     1.0    1.2411  1.0529  0.8648  0.7017  0.5596  0.3983  0.2467  0
     1.2    1.3287  1.1254  0.9221  0.7462  0.5936  0.4219  0.2614  0
     1.4    1.4365  1.2149  0.9933  0.8021  0.6360  0.4509  0.2794  0
     1.6    1.5711  1.3260  1.0809  0.8700  0.6874  0.4860  0.3011  0
     1.8    0.0000  0.0000  0.0000  0.0000  0.0000  0.0000  0.0000  0
    </tableData>
   </table>
  </function>

</turbine_engine>
