<?xml version="1.0"?>
<?xml-stylesheet type="text/xsl" href="http://jsbsim.sourceforge.net/JSBSim.xsl"?>

<fdm_config name="F-18F" version="2.0" release="ALPHA"
   xmlns:xsi="http://www.w3.org/2001/XMLSchema-instance"
   xsi:noNamespaceSchemaLocation="http://jsbsim.sourceforge.net/JSBSim.xsd">

 <fileheader>
  <author> Aeromatic v 3.3.10 </author>
  <filecreationdate> 22 Jun 2024 </filecreationdate>
  <version>$Revision: 1.78 $</version>
  <description> Models a F-18F. </description>
 </fileheader>

<!--
  File:     F-18F.xml
  Inputs:
    name:          F-18F
    type:          Multi-engine Fighter Jet
    stall speed:   130.00kts
    max weight:    66000.00 lb
    length:        60.20 ft
    wing:
     span:         41.80 ft
     area:         500.00 sq-ft
     mean chord:   8.06 ft
     aspect ratio: 4.00:1
     taper ratio:  0.40:1
     incidence:    1.50 degrees
     dihedral:     -2.00 degrees
     sweep:        20.00 degrees

    no. engines:   2
    engine type:   Turbine Engine
    engine layout: aft fuselage

    control type:   Conventional with Yaw Damper

    gear type:     tricycle
    steering type: steering
    retractable?:  yes

  Outputs:
    wing loading:       132.00 lb/sq-ft
     - thickness ratio: 8.52%
    payload:            20257.00 lbs
    CL-alpha:           4.09 per radian
    CL-0:               0.46
    CL-max:             2.31
    CD-0:               0.01
    K:                  0.12
    Mcrit:              0.81
-->

 <metrics>
   <wingarea  unit="FT2">   500.00 </wingarea>
   <wingspan  unit="FT" >    41.80 </wingspan>
   <wing_incidence unit="DEG"> 1.50 </wing_incidence>
   <chord     unit="FT" >     8.06 </chord>
   <htailarea unit="FT2">   120.00 </htailarea>
   <htailarm  unit="FT" >    24.08 </htailarm>
   <vtailarea  unit="FT2">  120.00 </vtailarea>
   <vtailarm  unit="FT" >    24.08 </vtailarm>
   <location name="AERORP" unit="IN">
     <x>   433.44 </x>
     <y>     0.00 </y>
     <z>   -18.06 </z>
   </location>
   <location name="EYEPOINT" unit="IN">
     <x>   144.48 </x>
     <y>     0.00 </y>
     <z>    38.00 </z>
   </location>
   <location name="VRP" unit="IN">
     <x>  357.50 </x>
     <y>    0.0  </y>
     <z>  -86.69 </z>
   </location>
 </metrics>

 <mass_balance>
   <ixx unit="SLUG*FT2">   31028.00 </ixx>
   <iyy unit="SLUG*FT2">  193944.00 </iyy>
   <izz unit="SLUG*FT2">  215070.00 </izz>
   <ixz unit="SLUG*FT2">   -2135.00 </ixz>
   <emptywt unit="LBS" >   32081.00 </emptywt>
   <location name="CG" unit="IN">
     <x>   433.44 </x>
     <y>     0.00 </y>
     <z>   -18.06 </z>
   </location>
   <pointmass name="Left_wing_tip">
    <weight unit="LBS"> 10128.50 </weight>
    <location name="POINTMASS" unit="IN">
     <x>   433.44 </x>
     <y>  -240.00 </y>
     <z>   -18.06 </z>
    </location>
   </pointmass>
   <pointmass name="Left_wing_outer">
    <weight unit="LBS"> 10128.50 </weight>
    <location name="POINTMASS" unit="IN">
     <x>   433.44 </x>
     <y>  -180.00 </y>
     <z>   -18.06 </z>
    </location>
   </pointmass>
   <pointmass name="Left_wing_middle">
    <weight unit="LBS"> 10128.50 </weight>
    <location name="POINTMASS" unit="IN">
     <x>   433.44 </x>
     <y>  -140.00 </y>
     <z>   -18.06 </z>
    </location>
   </pointmass>
   <pointmass name="Left_wing_inner">
    <weight unit="LBS"> 10128.50 </weight>
    <location name="POINTMASS" unit="IN">
     <x>   433.44 </x>
     <y>  -100.00 </y>
     <z>   -18.06 </z>
    </location>
   </pointmass>
   <pointmass name="Left_fuselage">
    <weight unit="LBS"> 10128.50 </weight>
    <location name="POINTMASS" unit="IN">
     <x>   433.44 </x>
     <y>   -50.00 </y>
     <z>   -18.06 </z>
    </location>
   </pointmass>
   <pointmass name="Center">
    <weight unit="LBS"> 10128.50 </weight>
    <location name="POINTMASS" unit="IN">
     <x>   433.44 </x>
     <y>     0.00 </y>
     <z>   -18.06 </z>
    </location>
   </pointmass>
   <pointmass name="Right_fuselage">
    <weight unit="LBS"> 10128.50 </weight>
    <location name="POINTMASS" unit="IN">
     <x>   433.44 </x>
     <y>    50.00 </y>
     <z>   -18.06 </z>
    </location>
   </pointmass>
   <pointmass name="Right_wing_inner">
    <weight unit="LBS"> 10128.50 </weight>
    <location name="POINTMASS" unit="IN">
     <x>   433.44 </x>
     <y>   100.00 </y>
     <z>   -18.06 </z>
    </location>
   </pointmass>
   <pointmass name="Right_wing_middle">
    <weight unit="LBS"> 10128.50 </weight>
    <location name="POINTMASS" unit="IN">
     <x>   433.44 </x>
     <y>   140.00 </y>
     <z>   -18.06 </z>
    </location>
   </pointmass>
   <pointmass name="Right_wing_outer">
    <weight unit="LBS"> 10128.50 </weight>
    <location name="POINTMASS" unit="IN">
     <x>   433.44 </x>
     <y>   180.00 </y>
     <z>   -18.06 </z>
    </location>
   </pointmass>
   <pointmass name="Right_wing_tip">
    <weight unit="LBS"> 10128.50 </weight>
    <location name="POINTMASS" unit="IN">
     <x>   433.44 </x>
     <y>   240.00 </y>
     <z>   -18.06 </z>
    </location>
   </pointmass>
 </mass_balance>

 <propulsion>

   <engine file="F414">
    <location unit="IN">
      <x>   662.40 </x>
      <y>   -20.00 </y>
      <z>   -18.06 </z>
    </location>
    <orient unit="DEG">
      <pitch>     0.00 </pitch>
       <roll>     0.00 </roll>
        <yaw>     0.00 </yaw>
    </orient>
    <feed> 0 </feed>
    <feed> 1 </feed>
    <feed> 2 </feed>
    <feed> 3 </feed>
    <feed> 4 </feed>
    <feed> 5 </feed>
    <feed> 6 </feed>
    <feed> 7 </feed>
    <feed> 8 </feed>
    <feed> 9 </feed>
    <feed>10 </feed>
    <thruster file="direct">
     <sense> 1 </sense>
     <location unit="IN">
       <x>   662.40 </x>
       <y>   -20.00 </y>
       <z>   -18.06 </z>
     </location>
     <orient unit="DEG">
       <pitch>     0.00 </pitch>
        <roll>     0.00 </roll>
         <yaw>     0.00 </yaw>
     </orient>
    </thruster>
  </engine>

   <engine file="F414">
    <location unit="IN">
      <x>   662.40 </x>
      <y>    20.00 </y>
      <z>   -18.06 </z>
    </location>
    <orient unit="DEG">
      <pitch>     0.00 </pitch>
       <roll>     0.00 </roll>
        <yaw>     0.00 </yaw>
    </orient>
    <feed> 0 </feed>
    <feed> 1 </feed>
    <feed> 2 </feed>
    <feed> 3 </feed>
    <feed> 4 </feed>
    <feed> 5 </feed>
    <feed> 6 </feed>
    <feed> 7 </feed>
    <feed> 8 </feed>
    <feed> 9 </feed>
    <feed>10 </feed>
    <thruster file="direct">
     <sense> 1 </sense>
     <location unit="IN">
       <x>   662.40 </x>
       <y>    20.00 </y>
       <z>   -18.06 </z>
     </location>
     <orient unit="DEG">
       <pitch>     0.00 </pitch>
        <roll>     0.00 </roll>
         <yaw>     0.00 </yaw>
     </orient>
    </thruster>
  </engine>

  <tank type="FUEL" number="0">
     <location unit="IN">
       <x>   433.44 </x>
       <y>     0.00 </y>
       <z>   -18.06 </z>
     </location>
     <priority>5</priority>
     <capacity unit="LBS"> 1440.00 </capacity>
     <contents unit="LBS"> 1440.00 </contents>
  </tank>
  <tank type="FUEL" number="1">
     <location unit="IN">
       <x>   433.44 </x>
       <y>     0.00 </y>
       <z>   -18.06 </z>
     </location>
     <priority>5</priority>
     <capacity unit="LBS"> 2600.00 </capacity>
     <contents unit="LBS"> 2600.00 </contents>
  </tank>
  <tank type="FUEL" number="2">
     <location unit="IN">
       <x>   433.44 </x>
       <y>     0.00 </y>
       <z>   -18.06 </z>
     </location>
     <priority>5</priority>
     <capacity unit="LBS"> 2620.00 </capacity>
     <contents unit="LBS"> 2620.00 </contents>
  </tank>
  <tank type="FUEL" number="3">
     <location unit="IN">
       <x>   433.44 </x>
       <y>     0.00 </y>
       <z>   -18.06 </z>
     </location>
     <priority>5</priority>
     <capacity unit="LBS"> 3780.00 </capacity>
     <contents unit="LBS"> 3780.00 </contents>
  </tank>
  <tank type="FUEL" number="4">
     <location unit="IN">
       <x>   433.44 </x>
       <y>     0.00 </y>
       <z>   -18.06 </z>
     </location>
     <priority>4</priority>
     <capacity unit="LBS"> 1660.00 </capacity>
     <contents unit="LBS"> 1660.00 </contents>
  </tank>
  <tank type="FUEL" number="5">
     <location unit="IN">
       <x>   433.44 </x>
       <y>     0.00 </y>
       <z>   -18.06 </z>
     </location>
     <priority>4</priority>
     <capacity unit="LBS"> 1660.00 </capacity>
     <contents unit="LBS"> 1660.00 </contents>
  </tank>
  <tank type="FUEL" number="6">
     <location unit="IN">
       <x>   433.44 </x>
       <y>  -140.00 </y>
       <z>   -18.06 </z>
     </location>
     <priority>1</priority>
     <capacity unit="LBS"> 3216.00 </capacity>
     <contents unit="LBS"> 0000.00 </contents>
  </tank>
  <tank type="FUEL" number="7">
     <location unit="IN">
       <x>   433.44 </x>
       <y>  -100.00 </y>
       <z>   -18.06 </z>
     </location>
     <priority>2</priority>
     <capacity unit="LBS"> 3216.00 </capacity>
     <contents unit="LBS"> 0000.00 </contents>
  </tank>
  <tank type="FUEL" number="8">
     <location unit="IN">
       <x>   433.44 </x>
       <y>     0.00 </y>
       <z>   -18.06 </z>
     </location>
     <priority>3</priority>
     <capacity unit="LBS"> 3216.00 </capacity>
     <contents unit="LBS"> 0000.00 </contents>
  </tank>
  <tank type="FUEL" number="9">
     <location unit="IN">
       <x>   433.44 </x>
       <y>   100.00 </y>
       <z>   -18.06 </z>
     </location>
     <priority>2</priority>
     <capacity unit="LBS"> 3216.00 </capacity>
     <contents unit="LBS"> 0000.00 </contents>
  </tank>
  <tank type="FUEL" number="10">
     <location unit="IN">
       <x>   433.44 </x>
       <y>   140.00 </y>
       <z>   -18.06 </z>
     </location>
     <priority>1</priority>
     <capacity unit="LBS"> 3216.00 </capacity>
     <contents unit="LBS"> 0000.00 </contents>
  </tank>

 </propulsion>

 <ground_reactions>

  <contact type="BOGEY" name="NOSE">
    <location unit="IN">
      <x>    93.91 </x>
      <y>     0.00 </y>
      <z>   -86.69 </z>
    </location>
    <static_friction>  0.80 </static_friction>
    <dynamic_friction> 0.50 </dynamic_friction>
    <rolling_friction> 0.02 </rolling_friction>
    <spring_coeff  unit="LBS/FT">     19800.00 </spring_coeff>
    <damping_coeff unit="LBS/FT/SEC"> 5900.00 </damping_coeff>
    <max_steer unit="DEG"> 65.00 </max_steer>
    <brake_group> NONE </brake_group>
    <retractable> 1 </retractable>
  </contact>

  <contact type="BOGEY" name="LEFT_MAIN">
    <location unit="IN">
      <x>   450.78 </x>
      <y>   -45.14 </y>
      <z>   -86.69 </z>
    </location>
    <static_friction>  0.80 </static_friction>
    <dynamic_friction> 0.50 </dynamic_friction>
    <rolling_friction> 0.02 </rolling_friction>
    <spring_coeff  unit="LBS/FT">     66000.00 </spring_coeff>
    <damping_coeff unit="LBS/FT/SEC"> 13000.00 </damping_coeff>
    <max_steer unit="DEG">0</max_steer>
    <brake_group> LEFT </brake_group>
    <retractable> 1 </retractable>
  </contact>

  <contact type="BOGEY" name="RIGHT_MAIN">
    <location unit="IN">
      <x>   450.78 </x>
      <y>    45.14 </y>
      <z>   -86.69 </z>
    </location>
    <static_friction>  0.80 </static_friction>
    <dynamic_friction> 0.50 </dynamic_friction>
    <rolling_friction> 0.02 </rolling_friction>
    <spring_coeff  unit="LBS/FT">     66000.00 </spring_coeff>
    <damping_coeff unit="LBS/FT/SEC"> 13000.00 </damping_coeff>
    <max_steer unit="DEG">0</max_steer>
    <brake_group> RIGHT </brake_group>
    <retractable> 1 </retractable>
  </contact>

  <contact type="STRUCTURE" name="LEFT_WING">
    <location unit="IN">
     <x>   433.44 </x>
     <y>  -250.80 </y>
     <z>   -18.06 </z>
    </location>
   <static_friction>  1 </static_friction>
   <dynamic_friction> 1 </dynamic_friction>
   <spring_coeff unit="LBS/FT">      66000.00 </spring_coeff>
   <damping_coeff unit="LBS/FT/SEC"> 16000.00 </damping_coeff>
  </contact>

  <contact type="STRUCTURE" name="RIGHT_WING">
    <location unit="IN">
     <x>   433.44 </x>
     <y>   250.80 </y>
     <z>   -18.06 </z>
    </location>
   <static_friction>  1 </static_friction>
   <dynamic_friction> 1 </dynamic_friction>
   <spring_coeff unit="LBS/FT">      66000.00 </spring_coeff>
   <damping_coeff unit="LBS/FT/SEC"> 16000.00 </damping_coeff>
  </contact>

 </ground_reactions>

 <flight_control name="FCS: F-18F">

  <channel name="Thruster">
   <summer name="Thrust Coefficient Left">
    <output>systems/propulsion/thrust-coefficient-left</output>
   </summer>
   <summer name="Thrust Coefficient Right">
    <output>systems/propulsion/thrust-coefficient-right</output>
   </summer>
   <summer name="Thrust Coefficient Left-Right">
    <input>systems/propulsion/thrust-coefficient-left</input>
    <input>-systems/propulsion/thrust-coefficient-right</input>
    <output>systems/propulsion/thrust-coefficient-left-right</output>
   </summer>
   <summer name="Thrust Coefficient">
    <input>systems/propulsion/thrust-coefficient-left</input>
    <input>systems/propulsion/thrust-coefficient-right</input>
    <output>systems/propulsion/thrust-coefficient</output>
   </summer>
  </channel>

  <property value="1">fcs/yaw-damper-enable</property>
  <property value="0">fcs/left-flap-pos-norm</property>
  <property value="0">fcs/right-flap-pos-norm</property>
  <property value="0">/controls/flight/drag-stores</property>

  <channel name="Pitch">

   <fcs_function name="Elevator cmd logic">
     <function>
     <description>Elevator logic</description>
         <product>
            <table>
              <independentVar>/velocities/airspeed-kt</independentVar>
              <tableData>
                    350   1.0
                    400   0.72
                    500   0.51
                    600   0.48
                    700   0.44
                    800   0.41
              </tableData>
            </table>
            <table>
              <independentVar>fcs/elevator-cmd-norm</independentVar>
              <tableData>
                    -1.0  -1.0
                     0.0   0.0
                     1.0   0.5
              </tableData>
            </table>
         </product>
     </function>
     <clipto>
       <min>-1 </min>
       <max> 1 </max>
     </clipto>
   </fcs_function>

   <fcs_function name="Elevator autotrim">
     <function>
     <description>Elevator logic</description>
         <product>
            <table>
              <independentVar lookup="row">/velocities/airspeed-kt</independentVar>
              <independentVar lookup="column">inertia/weight-lbs</independentVar>
              <tableData>
                          32000   49000    66000
                    350  -0.069  -0.097   -0.123
                    400  -0.058  -0.081   -0.102
                    500  -0.045  -0.061   -0.078
                    600  -0.038  -0.050   -0.060
                    700  -0.035  -0.045   -0.055
                    770  -0.034  -0.043   -0.053
              </tableData>
            </table>
            <cos>
              <product>
                <property>/orientation/roll-deg</property>
                <value>0.0174533</value>
              </product>
            </cos>
            <cos>
              <product>
                <property>/orientation/pitch-deg</property>
                <value>0.0174533</value>
              </product>
            </cos>
         </product>
     </function>
   </fcs_function>

   <summer name="Pitch Trim Sum">
      <input>fcs/elevator-cmd-logic</input>
      <input>fcs/elevator-autotrim</input>
      <input>fcs/pitch-trim-cmd-norm</input>
      <clipto>
        <min> -1 </min>
        <max>  1 </max>
      </clipto>
   </summer>

   <aerosurface_scale name="Elevator Control">
      <input>fcs/pitch-trim-sum</input>
      <range>
        <min> -0.35 </min>
        <max>  0.35 </max>
      </range>
   </aerosurface_scale>

   <lag_filter name="Elevator Pos Rad">
     <input>fcs/elevator-control</input>
     <c1>10</c1>
     <clipto>
        <min> -0.35 </min>
        <max>  0.35 </max>
     </clipto>
   </lag_filter>

   <aerosurface_scale name="Elevator Pos Norm">
      <input>fcs/elevator-pos-rad</input>
      <domain>
        <min> -0.35 </min>
        <max>  0.35 </max>
      </domain>
      <range>
        <min> -1 </min>
        <max>  1 </max>
      </range>
   </aerosurface_scale>

   <fcs_function name="left-elevator-pos-norm">
     <function>
     <description>Left elevator for animation</description>
       <sum>
         <property>fcs/elevator-pos-norm</property>
         <product>
           <property>fcs/left-aileron-raw-pos-norm</property>
           <value>0.5</value>
          </product>
       </sum>
     </function>
     <output>/surface-positions/left-elevator-pos-norm</output>
   </fcs_function>

   <fcs_function name="right-elevator-pos-norm">
     <function>
     <description>Right elevator for animation</description>
       <sum>
         <property>fcs/elevator-pos-norm</property>
         <product>
           <property>fcs/right-aileron-raw-pos-norm</property>
           <value>0.5</value>
          </product>
       </sum>
     </function>
     <output>/surface-positions/right-elevator-pos-norm</output>
   </fcs_function>

  </channel>

  <channel name="Roll">

   <fcs_function name="Aileron cmd logic">
     <function>
     <description>Aileron logic</description>
         <product>
            <table>
              <independentVar>/velocities/airspeed-kt</independentVar>
              <tableData>
                    250   1.0
                    300   0.8
                    400   0.45
                    500   0.35
                    600   0.34
                    700   0.30
                    800   0.27
              </tableData>
            </table>
            <property>fcs/aileron-cmd-norm</property>
         </product>
     </function>
     <clipto>
       <min>-1 </min>
       <max> 1 </max>
     </clipto>
   </fcs_function>

   <summer name="Roll Trim Sum">
      <input>fcs/aileron-cmd-logic</input>
      <input>fcs/roll-trim-cmd-norm</input>
      <clipto>
        <min> -1 </min>
        <max>  1 </max>
      </clipto>
   </summer>

   <aerosurface_scale name="Left Aileron Control">
      <input>fcs/roll-trim-sum</input>
      <range>
        <min> -0.35 </min>
        <max>  0.35 </max>
      </range>
   </aerosurface_scale>

   <aerosurface_scale name="Right Aileron Control">
      <input>-fcs/roll-trim-sum</input>
      <range>
        <min> -0.35 </min>
        <max>  0.35 </max>
      </range>
   </aerosurface_scale>

   <lag_filter name="Left Aileron Pos Rad">
     <input>fcs/left-aileron-control</input>
     <c1>10</c1>
     <clipto>
        <min> -0.35 </min>
        <max>  0.35 </max>
     </clipto>
   </lag_filter>

   <lag_filter name="Right Aileron Pos Rad">
     <input>fcs/right-aileron-control</input>
     <c1>10</c1>
     <clipto>
        <min> -0.35 </min>
        <max>  0.35 </max>
     </clipto>
   </lag_filter>

   <aerosurface_scale name="Left Aileron Raw Pos Norm">
      <input>fcs/left-aileron-pos-rad</input>
      <domain>
        <min> -0.35 </min>
        <max>  0.35 </max>
      </domain>
      <range>
        <min> -1 </min>
        <max>  1 </max>
      </range>
   </aerosurface_scale>

   <fcs_function name="left-aileron-pos-norm">
     <function>
     <description>Left aileron for animation</description>
       <sum>
         <property>fcs/left-aileron-raw-pos-norm</property>
         <property>-fcs/speedbrake-pos-norm</property>
         <product>
           <property>fcs/flap-pos-norm</property>
           <value>0.5</value>
          </product>
       </sum>
     </function>
     <output>/surface-positions/left-aileron-pos-norm</output>
   </fcs_function>

   <aerosurface_scale name="Right Aileron Raw Pos Norm">
      <input>fcs/right-aileron-pos-rad</input>
      <domain>
        <min> -0.35 </min>
        <max>  0.35 </max>
      </domain>
      <range>
        <min> -1 </min>
        <max>  1 </max>
      </range>
   </aerosurface_scale>

   <fcs_function name="right-aileron-pos-norm">
     <function>
     <description>Right aileron for animation</description>
       <sum>
         <property>fcs/right-aileron-raw-pos-norm</property>
         <property>-fcs/speedbrake-pos-norm</property>
         <product>
           <property>fcs/flap-pos-norm</property>
           <value>0.5</value>
          </product>
       </sum>
     </function>
     <output>/surface-positions/right-aileron-pos-norm</output>
   </fcs_function>

  </channel>

  <channel name="Yaw">
   <summer name="Rudder Command Sum">
      <input>fcs/rudder-cmd-norm</input>
      <input>fcs/yaw-trim-cmd-norm</input>
      <clipto>
        <min> -1 </min>
        <max>  1 </max>
      </clipto>
   </summer>

   <scheduled_gain name="Yaw Damper Rate">
      <input>velocities/r-aero-rad_sec</input>
      <table>
        <independentVar lookup="row">velocities/ve-kts</independentVar>
         <tableData>
            30     0.00
            60     2.00
         </tableData>
      </table>
      <gain>fcs/yaw-damper-enable</gain>
   </scheduled_gain>

   <summer name="Rudder Sum">
      <input>fcs/rudder-command-sum</input>
      <input>fcs/yaw-damper-rate</input>
      <clipto>
        <min> -1.1 </min>
        <max>  1.1 </max>
      </clipto>
   </summer>

   <aerosurface_scale name="Rudder Control">
      <input>fcs/rudder-sum</input>
      <domain>
        <min> -1.1 </min>
        <max>  1.1 </max>
      </domain>
      <range>
        <min> -0.35 </min>
        <max>  0.35 </max>
      </range>
   </aerosurface_scale>

   <lag_filter name="Rudder position filtered">
     <input>fcs/rudder-control</input>
     <c1>10</c1>
     <clipto>
     <min>-0.35</min>
     <max>0.35</max>
     </clipto>
     <output>fcs/rudder-pos-rad</output>
   </lag_filter>

   <aerosurface_scale name="Rudder Normalization">
      <input>fcs/rudder-pos-rad</input>
      <domain>
        <min> -0.35 </min>
        <max>  0.35 </max>
      </domain>
      <range>
        <min> -1 </min>
        <max>  1 </max>
      </range>
      <output>fcs/rudder-pos-norm</output>
   </aerosurface_scale>

   <summer name="left-rudder-pos-norm">
      <input>fcs/rudder-pos-norm</input>
      <input>-fcs/speedbrake-pos-norm</input>
      <clipto>
        <min> -1 </min>
        <max>  1 </max>
      </clipto>
      <output>/surface-positions/left-rudder-pos-norm</output>
   </summer>

   <summer name="right-rudder-pos-norm">
      <input>fcs/rudder-pos-norm</input>
      <input>fcs/speedbrake-pos-norm</input>
      <clipto>
        <min> -1 </min>
        <max>  1 </max>
      </clipto>
      <output>/surface-positions/right-rudder-pos-norm</output>
   </summer>

  </channel>

  <channel name="Landing Gear">
   <switch name="fcs/gear-no-wow">
     <default value="1"/>
     <test logic="AND" value="0">
         gear/unit[1]/WOW eq 1
         gear/unit[2]/WOW eq 1
     </test>
   </switch>

   <kinematic name="Landing Gear Control">
     <input>gear/gear-cmd-norm</input>
     <traverse>
       <setting>
          <position> 0 </position>
          <time>     0 </time>
       </setting>
       <setting>
          <position> 1 </position>
          <time>     5 </time>
       </setting>
     </traverse>
     <output>gear/gear-pos-norm</output>
   </kinematic>
  </channel>

  <channel name="Flaps">

   <fcs_function name="Flap cmd logic">
     <function>
     <description>Flaps logic</description>
       <sum>
         <product>
            <table>
              <independentVar>/velocities/airspeed-kt</independentVar>
              <tableData>
                    180   1.0
                    250   0.0
              </tableData>
            </table>
            <table>
              <independentVar>fcs/flap-cmd-norm</independentVar>
              <tableData>
                    0.0   0.00
                    0.5   0.75
                    1.0   1.00
              </tableData>
            </table>
         </product>
         <product>
           <table>
             <independentVar>/orientation/alpha-deg</independentVar>
             <tableData>
                    05   0.0
                    15   0.5
                    40   0.5
                    50   0.0
             </tableData>
           </table>
           <table>
             <independentVar>gear/unit[0]/WOW</independentVar>
             <tableData>
                    0   1
                    1   0
             </tableData>
           </table>
         </product>
       </sum>
     </function>
     <clipto>
       <min> 0 </min>
       <max> 1 </max>
     </clipto>
   </fcs_function>

   <kinematic name="Flap pos deg">
    <input>fcs/flap-cmd-logic</input>
    <traverse>
      <setting>
         <position>  0 </position>
         <time>      0 </time>
      </setting>
      <setting>
         <position> 30 </position>
         <time>      2 </time>
      </setting>
    </traverse>
   </kinematic>

   <aerosurface_scale name="Flap Pos Norm">
    <input>fcs/flap-pos-deg</input>
    <domain>
      <min>  0 </min>
      <max> 30 </max>
    </domain>
    <range>
      <min> 0 </min>
      <max> 1 </max>
    </range>
   </aerosurface_scale>

   <fcs_function name="left-flap-pos-norm">
     <function>
     <description>Left flap for animation</description>
       <sum>
         <property>fcs/flap-pos-norm</property>
         <property>fcs/speedbrake-pos-norm</property>
         <product>
           <property>fcs/left-aileron-pos-norm</property>
           <value>0.25</value>
          </product>
       </sum>
     </function>
     <output>/surface-positions/left-flap-pos-norm</output>
   </fcs_function>

   <fcs_function name="right-flap-pos-norm">
     <function>
     <description>Right flap for animation</description>
       <sum>
         <property>fcs/flap-pos-norm</property>
         <property>fcs/speedbrake-pos-norm</property>
         <product>
           <property>fcs/right-aileron-pos-norm</property>
           <value>0.25</value>
          </product>
       </sum>
     </function>
     <output>/surface-positions/right-flap-pos-norm</output>
   </fcs_function>

  </channel>

  <channel name="Slats">

   <fcs_function name="slat pos logic">
     <function>
     <description>Slats for animation</description>
       <sum>
         <product>
            <table>
              <independentVar>/velocities/airspeed-kt</independentVar>
              <tableData>
                    180   1.0
                    250   0.0
              </tableData>
            </table>
            <table>
              <independentVar>fcs/flap-cmd-norm</independentVar>
              <tableData>
                    0.0   0.0
                    0.5   1.0
              </tableData>
            </table>
         </product>
         <product>
           <table>
             <independentVar>/orientation/alpha-deg</independentVar>
             <tableData>
                    10   0.0
                    24   1.0
                    60   1.0
                    80   0.0
             </tableData>
           </table>
           <table>
             <independentVar>gear/unit[0]/WOW</independentVar>
             <tableData>
                    0   1
                    1   0
             </tableData>
           </table>
         </product>
       </sum>
     </function>
   </fcs_function>

   <kinematic name="slat pos norm">
       <input>fcs/slat-pos-logic</input>
       <traverse>
        <setting>
          <position> 0 </position>
          <time>     0 </time>
        </setting>
        <setting>
          <position> 1.00 </position>
          <time>     0.75 </time>
        </setting>
       </traverse>
     <output>/surface-positions/slat-pos-norm</output>
   </kinematic>

  </channel>

  <channel name="Speedbrake">

   <kinematic name="Speedbrake Control">
     <input>fcs/speedbrake-cmd-norm</input>
     <traverse>
       <setting>
          <position> 0 </position>
          <time>     0 </time>
       </setting>
       <setting>
          <position> 1 </position>
          <time>     1 </time>
       </setting>
     </traverse>
     <output>fcs/speedbrake-pos-norm</output>
   </kinematic>
  </channel>

  <channel name="Engines_management">

   <fcs_function name="Throttle0">
     <function>
       <table>
         <independentVar>fcs/throttle-cmd-norm[0]</independentVar>
         <tableData>
                    0.00    0.0
                    0.845   1.0
                    1.00    2.0
         </tableData>
       </table>
     </function>
     <output>fcs/throttle-pos-norm[0]</output>
   </fcs_function>

   <fcs_function name="Throttle1">
     <function>
       <table>
         <independentVar>fcs/throttle-cmd-norm[1]</independentVar>
         <tableData>
                    0.00    0.0
                    0.845   1.0
                    1.00    2.0
         </tableData>
       </table>
     </function>
     <output>fcs/throttle-pos-norm[1]</output>
   </fcs_function>

   <fcs_function name="aft0">
     <function>
       <table>
         <independentVar>fcs/throttle-pos-norm[0]</independentVar>
         <tableData>
                    1.00    0.0
                    2.00    1.0
         </tableData>
       </table>
     </function>
     <output>/engines/engine[0]/afterburner</output>
   </fcs_function>

   <fcs_function name="aft1">
     <function>
       <table>
         <independentVar>fcs/throttle-pos-norm[1]</independentVar>
         <tableData>
                    1.00    0.0
                    2.00    1.0
         </tableData>
       </table>
     </function>
     <output>/engines/engine[1]/afterburner</output>
   </fcs_function>

  </channel>

  <channel name="Canopy">

            <kinematic name="Canopy Control">
                <input>/controls/flight/canopy</input>
                <traverse>
                    <setting>
                        <position>0</position>
                        <time>0</time>
                    </setting>
                    <setting>
                        <position>1</position>
                        <time>4</time>
                    </setting>
                </traverse>
                <output>/surface-positions/canopy-pos-norm</output>
            </kinematic>

  </channel>

  <channel name="Wing fold">

            <kinematic name="wing fold pos norm">
                <input>/controls/flight/wing-fold</input>
                <traverse>
                    <setting>
                        <position>0</position>
                        <time>0</time>
                    </setting>
                    <setting>
                        <position>1</position>
                        <time>4</time>
                    </setting>
                </traverse>
                <output>/surface-positions/wing-fold-pos-norm</output>
            </kinematic>

  </channel>

  <property>systems/hook/tailhook-cmd-norm</property>
  <property>systems/holdback/holdback-cmd</property>
  <property value="6.75">systems/hook/tailhook-length-ft</property>
  <property value="-18.0">systems/hook/tailhook-pos-min-deg</property>
  <property value="50.0">systems/hook/tailhook-pos-max-deg</property>
  <property value="520.0">systems/hook/tailhook-offset-x-in</property>
  <property value=  "0.0">systems/hook/tailhook-offset-y-in</property>
  <property value="-16.0">systems/hook/tailhook-offset-z-in</property>
  <property value="-18.0">systems/hook/tailhook-pos-deg</property>

  <channel name="Hook">

     <kinematic name="systems/hook/tailhook-control">
       <input>systems/hook/tailhook-cmd-norm</input>
       <traverse>
        <setting>
          <position> 0 </position>
          <time>     0 </time>
        </setting>
        <setting>
          <position> 1 </position>
          <time>     1.5 </time>
        </setting>
       </traverse>
       <output>systems/hook/tailhook-pos-norm</output>
     </kinematic>

     <switch name="systems/hook/ready">
          <default value="0"/>
          <test  logic="AND" value="1">
                systems/hook/tailhook-pos-norm gt 0.99
          </test>
     </switch>

     <fcs_function name="systems/hook/force">
       <function>
         <product>
           <sum>
             <property>forces/fbx-prop-lbs</property>
             <product>
               <property>inertia/weight-lbs</property>
               <table>
                 <independentVar lookup="row">gear/unit[1]/wheel-speed-fps</independentVar>
                 <tableData>
                   0     0.00
                   1     0.00
                   80    2.20
                 </tableData>
               </table>
             </product>
           </sum>
           <property>systems/hook/ready</property>
           <property>gear/unit[1]/WOW</property>
         </product>
       </function>
       <output>external_reactions/hook/magnitude</output>
     </fcs_function>

     <fcs_function name="systems/hook/animation-norm">
       <function>
         <product>
           <sum>
            <property>systems/hook/tailhook-pos-deg</property>
            <value>18</value>
           </sum>
           <value>0.016667</value>
           <value>0.67</value>
         </product>
       </function>
       <output>gear/tailhook-pos-norm</output>
     </fcs_function>

  </channel>

  <channel name="Nose_lift">

     <switch name="systems/nose_lift/logic">
        <default value="systems/nose_lift/strut-command"/>
          <test value="1">
                systems/holdback/holdback-cmd == 1
          </test>
          <test value="0">
                gear/gear-cmd-norm == 0
          </test>
       <output>systems/nose_lift/strut-command</output>
     </switch>

     <kinematic name="systems/nose_lift/strut-pump">
       <input>systems/nose_lift/strut-command</input>
       <traverse>
        <setting>
          <position> 0 </position>
          <time>     0 </time>
        </setting>
        <setting>
          <position> 1 </position>
          <time>     3 </time>
        </setting>
       </traverse>
       <output>systems/nose_lift/strut-pos-norm</output>
     </kinematic>

     <fcs_function name="systems/nose_lift/strut-z-position">
        <function>
          <sum>
             <value>-86.69</value>
             <product>
               <property>systems/nose_lift/strut-pos-norm</property>
               <value>2.5</value>
             </product>
          </sum>
        </function>
        <output>gear/unit[0]/z-position</output>
     </fcs_function>

  </channel>

  <channel name="Holdback_Launchbar">

     <switch name="systems/holdback/switch">
          <default value="0"/>
          <test value="forces/fbx-prop-lbs">
                systems/holdback/holdback-cmd == 1
          </test>
          <test value="0">
                gear/unit[1]/WOW == 0
          </test>
          <output>external_reactions/holdback/magnitude</output>
     </switch>

     <switch name="systems/launchbar/switch">
          <default value="0"/>
          <test logic="OR" value="1">
                systems/holdback/holdback-cmd == 1
                systems/catapult/cat-launch-cmd == 1
          </test>
     </switch>

     <kinematic name="systems/launchbar/position">
       <input>systems/launchbar/switch</input>
       <traverse>
        <setting>
          <position> 0 </position>
          <time>     0 </time>
        </setting>
        <setting>
          <position> 1 </position>
          <time>     1 </time>
        </setting>
       </traverse>
       <output>/gear/launchbar/position-norm</output>
     </kinematic>

  </channel>

  <channel name="Catapult">

       <switch name="systems/catapult/cat-cmd-norm">
          <default value="0"/>
          <test  logic="AND" value="0">
               systems/catapult/cat-pos-norm gt 0.999
          </test>
          <test  logic="AND" value="1">
               systems/catapult/cat-launch-cmd == 1
               gear/unit[1]/WOW == 1
          </test>
          <output>systems/catapult/cat-launch-cmd</output>
       </switch>

       <kinematic name="systems/catapult/cat-timer">
          <input>systems/catapult/cat-cmd-norm</input>
          <traverse>
              <setting>
                 <position>0.0</position>
                 <time>0.0</time>
              </setting>
              <setting>
                 <position>1.0</position>
                 <time>2.7</time>
              </setting>
          </traverse>
          <output>systems/catapult/cat-pos-norm</output>
       </kinematic>

       <pure_gain name="systems/catapult/cat-force">
          <input>inertia/weight-lbs</input>
          <gain>2.4</gain>
       </pure_gain>

       <switch name="systems/catapult/cat-final">
           <default value="0"/>
           <test  logic="AND" value="systems/catapult/cat-force">
                systems/catapult/cat-launch-cmd == 1
                systems/catapult/cat-pos-norm lt 0.999
                systems/catapult/cat-pos-norm gt 0.0
           </test>
           <output>external_reactions/catapult/magnitude</output>
       </switch>

   <fcs_function name="Calculate Cat Force X">
     <function>
       <cos>
           <property>attitude/psi-rad</property>
       </cos>
     </function>
     <output>external_reactions/catapult/x</output>
   </fcs_function>

   <fcs_function name="Calculate Cat Force Y">
     <function>
       <sin>
           <property>attitude/psi-rad</property>
       </sin>
     </function>
     <output>external_reactions/catapult/y</output>
   </fcs_function>

  </channel>

 </flight_control>

 <aerodynamics>

  <axis name="LIFT">

    <function name="aero/force/Lift_alpha">
      <description>Lift due to alpha</description>
      <product>
          <property>aero/qbar-psf</property>
          <property>metrics/Sw-sqft</property>
          <table>
            <independentVar lookup="row">aero/alpha-rad</independentVar>
            <tableData>
              -3.14 -0.300
              -2.60 0.800
              -2.08 0.800
              -1.57 0.000
              -1.00 -1.500
              -0.244  -1.039
              -0.175  -0.881
              -0.105  -0.551
              -0.035  -0.216
              0.035 0.154
              0.105 0.561
              0.175 0.952
              0.244 1.242
              0.314 1.398
              0.384 1.531
              0.454 1.641
              0.524 1.777
              0.593 1.887
              0.663 1.889
              0.733 1.81
              0.803 1.686
              0.873 1.575
              0.942 1.46
              1.012 1.319
              1.082 1.171
              1.152 1.022
              1.222 0.859
              1.292 0.685
              1.361 0.529
              1.431 0.378
              1.501 0.229
              1.571 0.091
              2.08  -0.800
              2.60  -0.800
              3.14  -0.300
            </tableData>
          </table>
          <product>
            <value>0.5</value>
              <sum>
                <value>2</value>
                <property>-/surface-positions/wing-fold-pos-norm</property>
              </sum>
          </product>
      </product>
    </function>

    <function name="aero/force/Lift_pitch_rate">
        <description>Lift due to pitch rate</description>
        <product>
          <property>aero/qbar-psf</property>
          <property>metrics/Sw-sqft</property>
          <property>velocities/q-aero-rad_sec</property>
          <property>aero/ci2vel</property>
          <value> 5.8682 </value>
        </product>
      </function>

      <function name="aero/force/Lift_alpha_rate">
        <description>Lift due to alpha rate</description>
        <product>
           <property>aero/qbar-psf</property>
           <property>metrics/Sw-sqft</property>
           <property>aero/alphadot-rad_sec</property>
           <property>aero/ci2vel</property>
           <value> 3.9121 </value>
        </product>
      </function>

    <function name="aero/force/Lift_elevator">
       <description>Lift due to Elevator Deflection</description>
       <product>
           <property>aero/qbar-psf</property>
           <property>metrics/Sw-sqft</property>
           <property>fcs/elevator-pos-rad</property>
           <value> 0.04 </value>
       </product>
    </function>

    <function name="aero/force/Lift_flap">
       <description>Delta Lift due to flaps</description>
       <product>
           <property>aero/qbar-psf</property>
           <property>metrics/Sw-sqft</property>
           <property>fcs/flap-pos-deg</property>
           <value> 0.0104 </value>
       </product>
    </function>

  </axis>

  <axis name="DRAG">

    <function name="aero/force/Drag_alpha">
       <description>Drag due to alpha</description>
       <product>
          <property>aero/qbar-psf</property>
          <property>metrics/Sw-sqft</property>
          <table>
            <independentVar lookup="row">aero/alpha-rad</independentVar>
            <tableData>
              -3.14 0.300
              -1.571 2.128
              -0.244 0.227
              -0.175 0.171
              -0.105 0.075
              -0.035 0.032
              0.035 0.028
              0.105 0.061
              0.175 0.154
              0.244 0.261
              0.314 0.364
              0.384 0.487
              0.454 0.644
              0.524 0.864
              0.593 1.086
              0.663 1.279
              0.733 1.476
              0.803 1.619
              0.873 1.746
              0.942 1.844
              1.012 1.924
              1.082 1.984
              1.152 2.028
              1.222 2.067
              1.292 2.114
              1.361 2.155
              1.431 2.174
              1.501 2.163
              1.571 2.128
              3.14 0.300
            </tableData>
          </table>
       </product>
    </function>

    <function name="aero/force/Drag_induced">
       <description>Induced drag</description>
         <product>
           <property>aero/qbar-psf</property>
           <property>metrics/Sw-sqft</property>
           <property>aero/cl-squared</property>
           <value> 0.0864 </value>
         </product>
    </function>

    <function name="aero/force/Drag_mach">
       <description>Drag due to mach</description>
        <product>
          <property>aero/qbar-psf</property>
          <property>metrics/Sw-sqft</property>
          <table>
            <independentVar lookup="row">velocities/mach</independentVar>
            <tableData>
                0.00    0.0000
                0.81    0.0000
                1.10    0.0230
                1.80    0.0150
            </tableData>
          </table>
        </product>
    </function>

    <function name="aero/force/Drag_beta">
       <description>Drag due to sideslip</description>
       <product>
          <property>aero/qbar-psf</property>
          <property>metrics/Sw-sqft</property>
          <table>
            <independentVar lookup="row">aero/beta-rad</independentVar>
            <tableData>
              -1.57    1.2300
              -0.26    0.0500
               0.00    0.0000
               0.26    0.0500
               1.57    1.2300
            </tableData>
          </table>
       </product>
    </function>

    <function name="aero/force/Drag_elevator">
       <description>Drag due to Elevator Deflection</description>
       <product>
           <property>aero/qbar-psf</property>
           <property>metrics/Sw-sqft</property>
           <abs><property>fcs/elevator-pos-rad</property></abs>
           <value> 0.0400 </value>
       </product>
    </function>

    <function name="aero/force/Drag_gear">
       <description>Drag due to gear</description>
         <product>
           <property>aero/qbar-psf</property>
           <property>metrics/Sw-sqft</property>
           <property>gear/gear-pos-norm</property>
           <value> 0.0200 </value>
         </product>
    </function>

    <function name="aero/force/Drag_stores">
       <description>Drag due to stores</description>
         <product>
           <property>aero/qbar-psf</property>
           <property>metrics/Sw-sqft</property>
           <property>/controls/flight/drag-stores</property>
           <value> 0.0600 </value>
         </product>
    </function>

    <function name="aero/force/Drag_flap">
       <description>Drag due to flaps</description>
         <product>
           <property>aero/qbar-psf</property>
           <property>metrics/Sw-sqft</property>
           <property>fcs/flap-pos-deg</property>
           <value> 0.0022 </value>
         </product>
    </function>

    <function name="aero/force/Drag_speedbrake">
       <description>Drag due to speedbrakes</description>
         <product>
           <property>aero/qbar-psf</property>
           <property>metrics/Sw-sqft</property>
           <property>fcs/speedbrake-pos-norm</property>
           <value> 0.0800 </value>
         </product>
    </function>

  </axis>

  <axis name="SIDE">

    <function name="aero/force/Side_beta">
       <description>Side force due to beta</description>
       <product>
           <property>aero/qbar-psf</property>
           <property>metrics/Sw-sqft</property>
           <property>aero/beta-rad</property>
           <value> -1.1209 </value>
       </product>
    </function>
    <function name="aero/force/Side_roll_rate">
       <description>Side force due to roll rate</description>
       <product>
           <property>aero/qbar-psf</property>
           <property>metrics/Sw-sqft</property>
           <property>aero/bi2vel</property>
           <property>velocities/p-aero-rad_sec</property>
           <table>
             <independentVar lookup="row">aero/Re</independentVar>
             <tableData>
                11269480   0.4282
                12396428   0.0340
                16904220   0.0151
                22527800   0.0085
             </tableData>
           </table>
       </product>
    </function>

    <function name="aero/force/Side_yaw_rate">
       <description>Side force due to yaw rate</description>
       <product>
           <property>aero/qbar-psf</property>
           <property>metrics/Sw-sqft</property>
           <property>aero/bi2vel</property>
           <property>velocities/r-aero-rad_sec</property>
           <value> 1.2914 </value>
       </product>
    </function>

    <function name="aero/force/Side_rudder">
       <description>Side force due to rudder</description>
       <product>
           <property>aero/qbar-psf</property>
           <property>metrics/Sw-sqft</property>
           <property>fcs/rudder-pos-rad</property>
           <value> 0.3376 </value>
       </product>
    </function>

  </axis>

  <axis name="PITCH">

    <function name="aero/moment/Pitch_alpha">
       <description>Pitch moment due to alpha</description>
       <product>
           <property>aero/qbar-psf</property>
           <property>metrics/Sw-sqft</property>
           <property>metrics/cbarw-ft</property>
           <property>aero/alpha-rad</property>
           <value> -1.0278 </value>
       </product>
    </function>

    <function name="aero/moment/Pitch_elevator">
       <description>Pitch moment due to elevator</description>
       <product>
          <property>aero/qbar-psf</property>
          <property>metrics/Sw-sqft</property>
          <property>metrics/cbarw-ft</property>
          <property>fcs/elevator-pos-rad</property>
          <table>
            <independentVar lookup="row">velocities/mach</independentVar>
            <tableData>
              0.0    -1.8715
              2.0    -0.4679
            </tableData>
          </table>
       </product>
    </function>

    <function name="aero/moment/Pitch_damp">
       <description>Pitch moment due to pitch rate</description>
       <product>
           <property>aero/qbar-psf</property>
           <property>metrics/Sw-sqft</property>
           <property>metrics/cbarw-ft</property>
           <property>aero/ci2vel</property>
           <property>velocities/q-aero-rad_sec</property>
           <value> -17.5316 </value>
       </product>
    </function>

    <function name="aero/moment/Pitch_alphadot">
       <description>Pitch moment due to alpha rate</description>
       <product>
           <property>aero/qbar-psf</property>
           <property>metrics/Sw-sqft</property>
           <property>metrics/cbarw-ft</property>
           <property>aero/ci2vel</property>
           <property>aero/alphadot-rad_sec</property>
           <value> -11.6878 </value>
       </product>
    </function>

  </axis>

  <axis name="ROLL">

    <function name="aero/moment/Roll_beta">
       <description>Roll moment due to beta</description>
       <product>
           <property>aero/qbar-psf</property>
           <property>metrics/Sw-sqft</property>
           <property>metrics/bw-ft</property>
           <property>aero/beta-rad</property>
           <table>
             <independentVar lookup="row">aero/alpha-rad</independentVar>
             <independentVar lookup="column">aero/Re</independentVar>
             <tableData>
                         11269480 12396428 16904220 22527800
                 -0.0349  -0.5749  -0.0464  -0.0247  -0.0245
                  0.3491  -2.5407  -0.1850  -0.1812  -0.2245
             </tableData>
           </table>
       </product>
    </function>

    <function name="aero/moment/Roll_damp">
       <description>Roll moment due to roll rate</description>
       <product>
           <property>aero/qbar-psf</property>
           <property>metrics/Sw-sqft</property>
           <property>metrics/bw-ft</property>
           <property>aero/bi2vel</property>
           <property>velocities/p-aero-rad_sec</property>
           <value> -0.2279 </value>
       </product>
    </function>

    <function name="aero/moment/Roll_yaw">
       <description>Roll moment due to yaw rate</description>
       <product>
           <property>aero/qbar-psf</property>
           <property>metrics/Sw-sqft</property>
           <property>metrics/bw-ft</property>
           <property>aero/bi2vel</property>
           <property>velocities/r-aero-rad_sec</property>
           <table>
             <independentVar lookup="row">aero/alpha-rad</independentVar>
             <independentVar lookup="column">aero/Re</independentVar>
             <tableData>
                         11269480 12396428 16904220 22527800
                 -0.0349   0.0479   0.0479   0.0479   0.0479
                  0.3491   5.7368   0.4401   0.4401   0.4401
             </tableData>
           </table>
       </product>
    </function>

    <function name="aero/moment/Roll_aileron">
       <description>Roll moment due to aileron</description>
       <product>
          <property>aero/qbar-psf</property>
          <property>metrics/Sw-sqft</property>
          <property>metrics/bw-ft</property>
          <property>fcs/left-aileron-pos-rad</property>
           <table>
            <independentVar lookup="row">velocities/mach</independentVar>
            <tableData>
              0.0    0.2400
              2.0    0.0600
            </tableData>
          </table>
       </product>
    </function>

    <function name="aero/moment/Roll_rudder">
       <description>Roll moment due to rudder</description>
       <product>
           <property>aero/qbar-psf</property>
           <property>metrics/Sw-sqft</property>
           <property>metrics/bw-ft</property>
           <property>fcs/rudder-pos-rad</property>
           <value> 0.0100 </value>
       </product>
    </function>

  </axis>

  <axis name="YAW">

    <!-- Stall initiator -->
    <function name="aero/moment/Yaw_alpha">
       <description>Yaw moment due to alpha</description>
       <product>
           <property>aero/qbar-psf</property>
           <property>metrics/Sw-sqft</property>
           <property>metrics/bw-ft</property>
           <property>aero/alpha-rad</property>
           <property>fcs/gear-no-wow</property>
           <table>
             <independentVar lookup="row">aero/beta-rad</independentVar>
             <independentVar lookup="column">aero/Re</independentVar>
             <tableData>
                         11269480 12396428
                 -0.3491  -1.0000   0.0000
                  0.3491   1.0000   0.0000
             </tableData>
           </table>
       </product>
    </function>

    <function name="aero/moment/Yaw_beta">
       <description>Yaw moment due to beta</description>
       <product>
           <property>aero/qbar-psf</property>
           <property>metrics/Sw-sqft</property>
           <property>metrics/bw-ft</property>
           <property>aero/beta-rad</property>
           <value> 0.3103 </value>
       </product>
    </function>

    <function name="aero/moment/Yaw_roll_rate">
       <description>Yaw moment due to roll rate</description>
       <product>
           <property>aero/qbar-psf</property>
           <property>metrics/Sw-sqft</property>
           <property>metrics/bw-ft</property>
           <property>aero/bi2vel</property>
           <property>velocities/p-rad_sec</property>
           <table>
             <independentVar lookup="row">aero/Re</independentVar>
             <tableData>
                11269480  -0.2466
                12396428  -0.0196
                16904220  -0.0087
                22527800  -0.0049
             </tableData>
           </table>
       </product>
    </function>

    <function name="aero/moment/Yaw_damp">
       <description>Yaw moment due to yaw rate</description>
       <product>
           <property>aero/qbar-psf</property>
           <property>metrics/Sw-sqft</property>
           <property>metrics/bw-ft</property>
           <property>aero/bi2vel</property>
           <property>velocities/r-aero-rad_sec</property>
           <value> -0.3748 </value>
       </product>
    </function>

    <function name="aero/moment/Yaw_rudder">
       <description>Yaw moment due to rudder</description>
       <product>
           <property>aero/qbar-psf</property>
           <property>metrics/Sw-sqft</property>
           <property>metrics/bw-ft</property>
           <property>fcs/rudder-pos-rad</property>
           <value> -0.1945 </value>
       </product>
    </function>

    <function name="aero/moment/Yaw_aileron">
       <description>Adverse yaw</description>
       <product>
           <property>aero/qbar-psf</property>
           <property>metrics/Sw-sqft</property>
           <property>metrics/bw-ft</property>
           <property>fcs/left-aileron-pos-rad</property>
           <value> 0.0000 </value>
       </product>
    </function>

  </axis>

 </aerodynamics>

 <external_reactions>

  <force name="catapult" frame="LOCAL">
   <location unit="IN">
    <x> 93.912 </x>
    <y> 0 </y>
    <z> -30.0 </z>
   </location>
   <direction>
     <x>   -0.9612617 </x>
     <y>   -0.2756374 </y>
     <z>    0.0 </z>
   </direction>
  </force>

  <force name="holdback" frame="BODY">
   <location unit="IN">
    <x> 83.912 </x>
    <y> 0 </y>
    <z> -30.0 </z>
   </location>
   <direction>
     <x>   -1.0 </x>
     <y>    0.0 </y>
     <z>    0.0 </z>
   </direction>
  </force>

  <force name="hook" frame="BODY">
   <location unit="IN">
     <x>  600.0 </x>
     <y>    0.0 </y>
     <z>  -60.0 </z>
   </location>
   <direction>
     <x>  -0.9995 </x>
     <y>   0.0    </y>
     <z>   0.01 </z>
   </direction>
  </force>

 </external_reactions>

</fdm_config>
